** written by FreeCAD inp file writer for CalculiX,Abaqus meshes
** highest dimension mesh elements only.

** Nodes
*Node, NSET=Nall
1, 3e-15, 3.3e-14, 147.15
2, 17.98711665093, 2.6e-14, 118.4056512772
3, 20, 1.4e-14, 62.15
4, 20, 1.3e-14, 57.15
5, -1.29823285e-07, 20, 57.15
6, 38.1, 20, 57.15
7, -38.1, 20, 57.15
8, 38.1, -20, 57.15
9, 1.03020185e-07, -20, 57.15
10, -38.1, -20, 57.15
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

** Volume elements
*Element, TYPE=C3D10, ELSET=Evolumes
6059, 4449, 4468, 4461, 4438, 12636, 12637, 12639, 12640, 12638, 12641
6060, 4718, 4147, 4148, 128, 12642, 12643, 12645, 12646, 12644, 12647
6061, 3150, 3153, 888, 862, 12648, 12649, 12651, 12652, 12650, 5975
6062, 1318, 1344, 1368, 4151, 7806, 7906, 7907, 12654, 12653, 12655
6063, 839, 3910, 791, 830, 12656, 12657, 5891, 5796, 12658, 5800
6064, 4668, 4670, 4669, 2839, 12659, 12660, 12662, 12663, 12661, 12664
6065, 2684, 2687, 4462, 2700, 12665, 12666, 12668, 12669, 12667, 12670
6066, 4493, 4465, 4494, 270, 12671, 12672, 12674, 12675, 12673, 12676
6067, 3778, 3777, 4258, 2870, 12677, 12678, 12680, 12681, 12679, 12682
6068, 4196, 4228, 3977, 4216, 12683, 12684, 12686, 12687, 12685, 12688
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
** Define element set Eall
*ELSET, ELSET=Eall
Evolumes


***********************************************************
** Element sets for materials and FEM element type (solid, shell, beam, fluid)
** written by write_element_sets_material_and_femelement_type function
*ELSET,ELSET=SolidMaterialSolid
Evolumes

***********************************************************
** Node sets for fixed constraint
** written by write_node_sets_constraints_fixed function
** FemConstraintFixed
*NSET,NSET=FemConstraintFixed
35,
36,
37,
38,
39,
40,
41,
42,
43,
44,
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
***********************************************************
** Materials
** written by write_materials function
** Young's modulus unit is MPa = N/mm2
** FreeCAD material name: Wood
** SolidMaterial
*MATERIAL, NAME=SolidMaterial
*ELASTIC
12000, 0.050

***********************************************************
** Sections
** written by write_femelementsets function
*SOLID SECTION, ELSET=SolidMaterialSolid, MATERIAL=SolidMaterial

***********************************************************
** At least one step is needed to run an CalculiX analysis of FreeCAD
** written by write_step_begin function
*STEP
*STATIC


***********************************************************
** Fixed Constraints
** written by write_constraints_fixed function
** FemConstraintFixed
*BOUNDARY
FemConstraintFixed,1
FemConstraintFixed,2
FemConstraintFixed,3


***********************************************************
** Node loads Constraints
** written by write_constraints_force function
*CLOAD
** FemConstraintForce
** node loads on shape: Fusion:Face33
3,1,0.0000000000000E+00
3,2,0.0000000000000E+00
3,3,-0.0000000000000E+00
4,1,0.0000000000000E+00
4,2,0.0000000000000E+00
4,3,-0.0000000000000E+00
5,1,0.0000000000000E+00
5,2,0.0000000000000E+00
5,3,-0.0000000000000E+00
9,1,0.0000000000000E+00
9,2,0.0000000000000E+00
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
** node loads on shape: Fusion:Face34
2,1,0.0000000000000E+00
2,2,0.0000000000000E+00
2,3,-0.0000000000000E+00
3,1,0.0000000000000E+00
3,2,0.0000000000000E+00
3,3,-0.0000000000000E+00
63,1,0.0000000000000E+00
63,2,0.0000000000000E+00
63,3,-0.0000000000000E+00
64,1,0.0000000000000E+00
64,2,0.0000000000000E+00
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
** node loads on shape: Fusion:Face35
1,1,0.0000000000000E+00
1,2,0.0000000000000E+00
1,3,-0.0000000000000E+00
2,1,0.0000000000000E+00
2,2,0.0000000000000E+00
2,3,-0.0000000000000E+00
63,1,0.0000000000000E+00
63,2,0.0000000000000E+00
63,3,-0.0000000000000E+00
64,1,0.0000000000000E+00
64,2,0.0000000000000E+00
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

***********************************************************
** Outputs --> frd file
** written by write_outputs_types function
*NODE FILE
U
*EL FILE
S, E
** outputs --> dat file
*NODE PRINT , NSET=Nall
U
*EL PRINT , ELSET=Eall
S

***********************************************************
** written by write_step_end function
*END STEP

***********************************************************
** CalculiX Input file
** written by write_footer function
**   written by    --> FreeCAD 0.17.13541 (Git)
**   written on    --> Tue Dec 11 21:31:41 2018
**   file name     --> Bell-metal-detector-FEM.FCStd
**   analysis name --> Analysis
**
**
**
**   Units
**
**   Geometry (mesh data)        --> mm
**   Materials (Young's modulus) --> N/mm2 = MPa
**   Loads (nodal loads)         --> N
**
